*Heading
** Job name: ball_125mm_latent Model name: Ball_125mm
** Generated by: Abaqus/CAE 2016
*Preprint, echo=NO, model=NO, history=NO, contact=NO
**
** PARTS
**
*Part, name=Ball
*Node
      1,           0.,           0.,      -0.0625
      2,           0.,           0.,           0.
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*Element, type=DC3D8
   1,  584,  585, 4459, 4180,   17,   18,  309,  308
   2,  585,  586, 4460, 4459,   18,   19,  310,  309
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*Nset, nset=ALL, generate
     1,  16467,      1
*Elset, elset=ALL, generate
     1,  15200,      1
*Nset, nset=InnerNode
 2,
*Nset, nset=OuterNode
 6,
*Elset, elset=_Outer_S3, internal
     1,     2,     3,     4,     5,     6
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*Elset, elset=_Outer_S4, internal
  1303,  1306,  1309,  1312,  1315,  1318
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*Elset, elset=_Outer_S2, internal
  1901,  1902,  1903,  1904,  1905,  1906
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*Surface, type=ELEMENT, name=Outer
_Outer_S3, S3
_Outer_S4, S4
_Outer_S2, S2
** Section: Section-1
*Solid Section, elset=ALL, material=Steel
,
*End Part
**
**
** ASSEMBLY
**
*Assembly, name=Assembly
**
*Instance, name=Ball-1, part=Ball
*End Instance
**
*Nset, nset=ALL, instance=Ball-1, generate
     1,  16467,      1
*Elset, elset=ALL, instance=Ball-1, generate
     1,  15200,      1
*End Assembly
**
** MATERIALS
**
*Material, name=Steel
*Conductivity
 60.5,
*Density
7850.,
**Depvar
**      1,
**Heat Generation
*Specific Heat
434.,
*Material, name=Steel-TempDepend
*Conductivity
 60.5,300.
 56.7,400.
  48.,600.
*Density
7850.,
*Specific Heat
434.,300.
487.,400.
559.,600.
**
** INTERACTION PROPERTIES
**
*Film Property, name=IntProp-1
33.
**
** PHYSICAL CONSTANTS
**
*Physical Constants, absolute zero=0., stefan boltzmann=5.67037e-08
**
** PREDEFINED FIELDS
**
** Name: Temperature   Type: Temperature
*Initial Conditions, type=TEMPERATURE
ALL, 433.15
** ----------------------------------------------------------------
**
** STEP: Step-1
**
*Step, name=Step-1, nlgeom=NO, inc=1000
*Heat Transfer, end=PERIOD, deltmx=1.
1., 4500., 0.045, 30.,
**
** INTERACTIONS
**
** Interaction: Int-1
*Sfilm
Ball-1.Outer, F, 298.15, IntProp-1
** Interaction: Int-2
*Sradiate
Ball-1.Outer, R, 298.15, 0.8
**
** OUTPUT REQUESTS
**
*Restart, write, frequency=0
*Monitor, dof=11, node=Ball-1.InnerNode, frequency=1
**
** FIELD OUTPUT: F-Output-1
**
*Output, field
*Node Output
NT,
*Element Output, directions=YES
**HFL, NFLUX, SDV, TEMP
HFL, NFLUX, TEMP
*Radiation Output
FTEMP, RADFL
**
** HISTORY OUTPUT: H-Output-2
**
*Output, history
*Node Output, nset=Ball-1.InnerNode
NT,
**
** HISTORY OUTPUT: H-Output-3
**
*Node Output, nset=Ball-1.OuterNode
NT,
*End Step
